# --------------------------------------------------------------------------------------------------------------------------------------------------------------------------------------------------------
# 2023 Bootcamp - Introduction to LAMMPS
# Exercise 3 - Checkpointing (Data file	- part 2)
# Joseph Cooke PhD
# --------------------------------------------------------------------------------------------------------------------------------------------------------------------------------------------------------
clear

# --------------------------------------------------------------------------------------------------------------------------------------------------------------------------------------------------------
# Variables
# --------------------------------------------------------------------------------------------------------------------------------------------------------------------------------------------------------
variable        a           equal 0.8442            # Lattice constant of material
variable        m           equal 1.0               # Mass of the material
variable        Lx          equal 12.0              # Length of the x direction domain
variable        Ly          equal 12.0              # Length of the y direction domain
variable        Lz          equal 12.0              # Length of the z direction domain
variable        T           equal 1.0               # Simulation temperature
variable        T_damp      equal 1.0               # Temperature damping constant
variable        seed        equal 1000              # Seed number
variable        P           equal 0.0               # Simulation pressure
variable        P_damp      equal 1000              # Pressure damping constant
variable        dt          equal 0.001             # Timestep
variable        sigma       equal 1.0               # Lennard-Jones potential value
variable        epsilon     equal 1.0               # Lennard-Jones potential value
variable        r_cut       equal 2.5               # Lennard-Jones cutoff length
variable        freq_out    equal 500               # Frequency of output
variable        runEq       equal 10000             # Equilibration

# --------------------------------------------------------------------------------------------------------------------------------------------------------------------------------------------------------
# General system setup (units, atom_style, dimensionality, boundary conditions)
# --------------------------------------------------------------------------------------------------------------------------------------------------------------------------------------------------------
units           lj                                  # Setting units for the simulation (https://docs.lammps.org/units.html)
dimension	3                                   # Dimensionality of siulation (https://docs.lammps.org/dimension.html)
boundary	p p p                               # Boundary conditions for simulation (https://docs.lammps.org/boundary.html)
atom_style      atomic                              # Atom style used in simulation (https://docs.lammps.org/atom_style.html)

# --------------------------------------------------------------------------------------------------------------------------------------------------------------------------------------------------------
# Setting up potentials
# --------------------------------------------------------------------------------------------------------------------------------------------------------------------------------------------------------
pair_style	lj/cut ${r_cut}                                  # Lennard-Jones Potential with cut off (https://docs.lammps.org/pair_style.html and https://docs.lammps.org/pair_lj.html)

# --------------------------------------------------------------------------------------------------------------------------------------------------------------------------------------------------------
# Creating the computational domain
# --------------------------------------------------------------------------------------------------------------------------------------------------------------------------------------------------------
read_data	example_2.data                                   # Reading in the data file to obtain configuration (https://docs.lammps.org/read_data.html)

# --------------------------------------------------------------------------------------------------------------------------------------------------------------------------------------------------------
# Neighbor list definitions
# --------------------------------------------------------------------------------------------------------------------------------------------------------------------------------------------------------
neighbor	0.3 bin                                          # Setting skin depth for neighbor list (https://docs.lammps.org/neighbor.html)
neigh_modify	every 10 check yes delay 20                      # Setting frequency of neighbor list checkes for rebuilds (https://docs.lammps.org/neigh_modify.html)

# --------------------------------------------------------------------------------------------------------------------------------------------------------------------------------------------------------
# Fixes
# --------------------------------------------------------------------------------------------------------------------------------------------------------------------------------------------------------
fix	        1 all nve                                        # Velocity-Verlet time integration (https://docs.lammps.org/fix_nve.html)

# --------------------------------------------------------------------------------------------------------------------------------------------------------------------------------------------------------
# Setting up the runtime (time step, how often data is collected, type of data is collected)
# --------------------------------------------------------------------------------------------------------------------------------------------------------------------------------------------------------
timestep        ${dt}                                                       # Setting the time step in the units selected in simulation (https://docs.lammps.org/timestep.html)
thermo		${freq_out}                                                 # Setting how often the thermo class properies is calculated and shown (https://docs.lammps.org/thermo.html)
thermo_style    custom step time pe ke etotal temp press lx ly lz           # Setting up custom thermo output (https://docs.lammps.org/thermo_style.html)

dump 	        1 all custom ${freq_out} dump_ex_3_data_checkpoint.lammpstrj id type x y z vx vy vz  # Setting up per atom data save (https://docs.lammps.org/dump.html)

# --------------------------------------------------------------------------------------------------------------------------------------------------------------------------------------------------------
# Runtime
# --------------------------------------------------------------------------------------------------------------------------------------------------------------------------------------------------------
run		${runEq}                                                    # Running the simulation for set time (https://docs.lammps.org/run.html)
